<?xml version="1.0"?>
<?xml-stylesheet type="text/xsl" href="http://jsbsim.sourceforge.net/JSBSim.xsl"?>
<fdm_config xmlns:xsi="http://www.w3.org/2001/XMLSchema-instance" name="c310" version="2.0" release="ALPHA" xsi:noNamespaceSchemaLocation="http://jsbsim.sourceforge.net/JSBSim.xsd">
	<fileheader>
		<author> AeromatiC++ version 3.3.20 </author>
		<filecreationdate> 21 May 2022 </filecreationdate>
		<version>$Revision: 1.80 $</version>
		<description> Models a c310. </description>
	</fileheader>
	<metrics>
		<wingarea unit="FT2">175</wingarea>
		<wingspan unit="FT">35.77</wingspan>
		<wing_incidence unit="DEG">2.5</wing_incidence>
		<chord unit="FT">5.08</chord>
		<htailarea unit="FT2">22.1</htailarea>
		<htailarm unit="FT">19</htailarm>
		<vtailarea unit="FT2">11.7</vtailarea>
		<vtailarm unit="FT">20.1</vtailarm>
		<location name="AERORP" unit="FT">
			<x>3.12</x>
			<y>0</y>
			<z>-1.12</z>
		</location>
		<location name="EYEPOINT" unit="IN">
			<x>53</x>
			<y>-12</y>
			<z>8</z>
		</location>
		<location name="VRP" unit="IN">
			<x>0</x>
			<y>0</y>
			<z>0</z>
		</location>
	</metrics>

	<mass_balance>
		<ixx unit="SLUG*FT2">8884</ixx>
		<iyy unit="SLUG*FT2">1939</iyy>
		<izz unit="SLUG*FT2">11001</izz>
		<emptywt unit="LBS">2850</emptywt>
		<location name="CG" unit="IN">
			<x>24.4</x>
			<y>0</y>
			<z>0.8</z>
		</location>

		<pointmass name="Pilot">
			<weight unit="LBS">140</weight>
			<location name="POINTMASS" unit="IN">
				<x>46</x>
				<y>-10.5</y>
				<z>1</z>
			</location>
		</pointmass>

		<pointmass name="Copilot">
			<weight unit="LBS">140</weight>
			<location name="POINTMASS" unit="IN">
				<x>46</x>
				<y>10.5</y>
				<z>1</z>
			</location>
		</pointmass>

		<pointmass name="Left passenger">
			<weight unit="LBS">140</weight>
			<location name="POINTMASS" unit="IN">
				<x>78</x>
				<y>-10.5</y>
				<z>1</z>
			</location>
		</pointmass>

		<pointmass name="Right passenger">
			<weight unit="LBS">140</weight>
			<location name="POINTMASS" unit="IN">
				<x>78</x>
				<y>10.5</y>
				<z>1</z>
			</location>
		</pointmass>
<!-- later models only
		<pointmass name="seat 5 OPT">
			<weight unit="LBS">110</weight>
			<location name="POINTMASS" unit="IN">
				<x>95</x>
				<y>-10.5</y>
				<z>4</z>
			</location>
		</pointmass>

		<pointmass name="seat 6 OPT">
			<weight unit="LBS">110</weight>
			<location name="POINTMASS" unit="IN">
				<x>95</x>
				<y>10.5</y>
				<z>4</z>
			</location>
		</pointmass>
-->
		<pointmass name="Baggage">
			<weight unit="LBS">100</weight>
			<location name="POINTMASS" unit="IN">
				<x>96</x>
				<y>0</y>
				<z>-11</z>
			</location>
		</pointmass>
	</mass_balance>

	<propulsion>
		<engine file="Continental-O-470-M">
			<feed>0</feed>

			<thruster file="Hartzell-HC82XF-2">
				<sense> 1 </sense>
				<location unit="IN">
					<x>-22.5</x>
					<y>-76.7</y>
					<z>-16.7</z>
				</location>
				<orient unit="DEG">
					<pitch>0</pitch>
					<roll>0</roll>
					<yaw>0</yaw>
				</orient>
			</thruster>
		</engine>

		<engine file="Continental-O-470-M">
			<feed>1</feed>

			<thruster file="Hartzell-HC82XF-2">
				<sense>1</sense>
				<location unit="IN">
					<x>-22.5</x>
					<y>76.7</y>
					<z>-16.7</z>
				</location>
				<orient unit="DEG">
					<pitch>0</pitch>
					<roll>0</roll>
					<yaw>0</yaw>
				</orient>
			</thruster>
		</engine>

		<tank type="FUEL" number="0">
			<location unit="IN">
				<x>35.4</x>
				<y>-214.4</y>
				<z>-11.5</z>
			</location>
			<capacity unit="LBS">316.2</capacity>
			<contents unit="LBS">100</contents>
			<unusable unit="LBS">6</unusable>
		</tank>

		<tank type="FUEL" number="1">
			<location unit="IN">
				<x>35.4</x>
				<y>214.4</y>
				<z>-11.5</z>
			</location>
			<capacity unit="LBS">316.2</capacity>
			<contents unit="LBS">100</contents>
			<unusable unit="LBS">6</unusable>
		</tank>
	</propulsion>

	<ground_reactions>
		<contact type="BOGEY" name="NOSE">
			<location unit="IN">
				<x>-60.3</x>
				<y>0</y>
				<z>-70.4</z>
			</location>
			<static_friction>1.5</static_friction>
			<dynamic_friction>0.5</dynamic_friction>
			<rolling_friction> 0.02 </rolling_friction>
			<spring_coeff unit="LBS/FT">1620</spring_coeff>
			<damping_coeff unit="LBS/FT/SEC">810</damping_coeff>
			<max_steer unit="DEG">55</max_steer>
			<brake_group>NONE</brake_group>
			<retractable>1</retractable>
		</contact>

		<contact type="BOGEY" name="LEFT_MAIN">
			<location unit="IN">
				<x>50.6</x>
				<y>-74.5</y>
				<z>-66.7</z>
			</location>
			<static_friction>0.8</static_friction>
			<dynamic_friction>0.5</dynamic_friction>
			<rolling_friction>0.02</rolling_friction>
			<spring_coeff unit="LBS/FT">5400</spring_coeff>
			<damping_coeff unit="LBS/FT/SEC">2700</damping_coeff>
			<max_steer unit="DEG">0</max_steer>
			<brake_group>LEFT</brake_group>
			<retractable>1</retractable>
		</contact>

		<contact type="BOGEY" name="RIGHT_MAIN">
			<location unit="IN">
				<x>50.6</x>
				<y>74.5</y>
				<z>-66.7</z>
			</location>
			<static_friction>0.8</static_friction>
			<dynamic_friction>0.5</dynamic_friction>
			<rolling_friction>0.02</rolling_friction>
			<spring_coeff unit="LBS/FT">5400</spring_coeff>
			<damping_coeff unit="LBS/FT/SEC">2700</damping_coeff>
			<max_steer unit="DEG">0</max_steer>
			<brake_group>RIGHT</brake_group>
			<retractable>1</retractable>
		</contact>

		<contact type="STRUCTURE" name="Left wing tip tank front tip">
			<location unit="IN">
				<x>-6.5</x>
				<y>-214.4</y>
				<z>-13.7</z>
			</location>
			<static_friction>0.5</static_friction>
			<dynamic_friction>0.5</dynamic_friction>
			<spring_coeff unit="LBS/FT">5400</spring_coeff>
			<damping_coeff unit="LBS/FT/SEC">2700</damping_coeff>
		</contact>

		<contact type="STRUCTURE" name="Left wing tip tank rear tip">
			<location unit="IN">
				<x>87.8</x>
				<y>-214.4</y>
				<z>-8.7</z>
			</location>
			<static_friction>0.5</static_friction>
			<dynamic_friction>0.5</dynamic_friction>
			<spring_coeff unit="LBS/FT">5400</spring_coeff>
			<damping_coeff unit="LBS/FT/SEC">2700</damping_coeff>
		</contact>

		<contact type="STRUCTURE" name="Right wing tip tank front tip">
			<location unit="IN">
				<x>-6.5</x>
				<y>214.4</y>
				<z>-13.7</z>
			</location>
			<static_friction>0.5</static_friction>
			<dynamic_friction>0.5</dynamic_friction>
			<spring_coeff unit="LBS/FT">5400</spring_coeff>
			<damping_coeff unit="LBS/FT/SEC">2700</damping_coeff>
		</contact>

		<contact type="STRUCTURE" name="Right wing tip tank rear tip">
			<location unit="IN">
				<x>87.8</x>
				<y>214.4</y>
				<z>-8.7</z>
			</location>
			<static_friction>0.5</static_friction>
			<dynamic_friction>0.5</dynamic_friction>
			<spring_coeff unit="LBS/FT">5400</spring_coeff>
			<damping_coeff unit="LBS/FT/SEC">2700</damping_coeff>
		</contact>

		<contact type="STRUCTURE" name="Tail cone tip">
			<location unit="IN">
				<x>260.9</x>
				<y>0</y>
				<z>-5.5</z>
			</location>
			<static_friction>0.5</static_friction>
			<dynamic_friction>0.5</dynamic_friction>
			<spring_coeff unit="LBS/FT">5400</spring_coeff>
			<damping_coeff unit="LBS/FT/SEC">2700</damping_coeff>
		</contact>
	</ground_reactions>

	<system file="gear"/>

	<flight_control file="Systems/fdm-fcs.xml"/>

	<aerodynamics file="Systems/fdm-aerodynamics.xml"/>

	<external_reactions>
	</external_reactions>
</fdm_config>
